y(x) := 2*x - cos(x)/x
# 1) область определения
x ≠ 0
y(-x) → cos(x)/x - 2*x  # 2 ) нечетная
y(0) =  # error: Деление на ноль.  # нет
# 3) нет пересечений с Оу
# - точки пересечения с Ох
y(x) == 0 solve → -0.634559945527
limit(y(x), x → 0-) → ∞
limit(y(x), x → 0+) → -∞  # 4) x=0 - точка разрыва 2ого рода
limit(y(x), x → -∞) → -∞
limit(y(x), x → ∞) → ∞  # 5) горизонтальных асимптот нет
k := limit(y(x)/x, x → ∞) → 2
b := limit(y(x) - k*x, x → ∞) → 0  # 6) наклонная асимптота -
as(x) := k*x + b
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y1(x) := d/dx(y(x)) → cos(x)/x^2 + sin(x)/x + 2
# 7) 1ая производная
# промежутки убывания
# возрастания
# точки экстремума
y1(x) < 0 solve →  # error: Решение не было найдено.  # нет
y1(x) > 0 solve →  # error
x ≠ 0
y1(x) == 0 solve →  # error  # нет
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y2(x) := d/dx(y1(x)) → cos(x)/x - 2*cos(x)/x^3 - 2*sin(x)/x^2
# 8) 2ая производная
# промежутки выпуклости вниз
# вверх
# точки перегиба
y2(x) < 0 solve →  # error
y2(x) > 0 solve →  # error
y2(x) == 0 solve → -227.756685971
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a := 6
x(t) := a*(t^2 - 1)/(1 + t^2)
y(t) := a*t*(t^2 - 1)/(1 + t^2)
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# строфоида
φ := 0, π/200 .. 2*π
a := 2
r(φ) := a*tan(φ)*sin(φ)
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# циссоида
Δa := 0.005
Δb := 0.05
a := 12.34
b := 14.3
z := (sqrt(a) + sqrt(b))/(b + ln(a))
# 1)
a1 := sqrt(a)
a1 = 3.51283
Δa1 := |d/da(sqrt(a))|*Δa
Δa1 = 0.000711676
Δa1 < 0.005 → 1
a1 := 3.513
# 2)
b1 := sqrt(b)
b1 = 3.78153
Δb1 := |d/db(sqrt(b))|*Δb
Δb1 = 0.00661107
Δb1 < 0.05 → 1
b1 := 3.78
# 3)
ch1 := a1 + b1
ch1 = 7.293
Δch1 := Δa1 + Δb1
Δch1 = 0.00732275
Δch1 < 0.05 → 1
ch1 := 7.29
