# 1
a := 0.5746
b := 42.884
Δb := 0.001
Δa := 0.00005
δa := |Δa/a|*100
δb := |Δb/b|*100
δa = 0.00870171  # %
δb = 0.00233187  # %
# 2
a := 1.247
b := 0.346
Δa := 0.0005
Δb := 0.0005
c := 0.051
Δc := 0.0005
z := (10*c + sqrt(b))/(a^2 - b)
z = 0.908362
# 1)
b1 := sqrt(b)
b1 = 0.588218
Δb1 := |d/db(sqrt(b))|*Δb
Δb1 = 0.000425013
Δb1 < 0.0005 → 1
b1 := 0.5882
# 2)
ch := 10*c + b1
ch = 1.0982
Δch := 10*Δc + Δb1
Δch = 0.00542501
Δch < 0.05 → 1
ch := 1.1
# 3)
a1 := a^2
a1 = 1.55501
Δa1 := |d/da(a^2)|*Δa
Δa1 = 0.001247
Δa1 < 0.005 → 1
a1 := 1.555
# 4)
zn := a1 - b
zn = 1.209
Δzn := Δa1 + Δb
Δzn = 0.001747
Δzn < 0.005 → 1
zn := 1.209
# 5)
z := ch/zn
z = 0.909843
Δz := (ch*Δzn + zn*Δch)/zn^2
Δz = 0.00580191
Δz < 0.05 → 1
z := 0.91
δz := |Δz/z|*100
δz = 0.637572  # %
# Ответ: z=0,9 верно в узком смысле
3
b := 7
a := 5
c := 5
# 1)
f(x, y) := sqrt(c^2*(x^2/a^2 + y^2/b^2))
f2(x, y) := sqrt((-1*c^2)*(x^2/a^2 + y^2/b^2))
i := 0 .. 20
j := 0 .. 20
h := 0.2
x[i] := -2 + i*h
y[j] := -2 + j*h
M[i, j] := f(x[i], y[j])
-матрица*апликат
M2[i, j] := f2(x[i], y[j])
# [component: inputs M, M2]
M = [
    2.45781, 2.37762, 2.3035, 2.23607, 2.17594, 2.12372, 2.08003, 2.0454, 2.02031, 2.0051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;
    2.298, 2.21203, 2.13216, 2.05913, 1.99366, 1.93654, 1.88853, 1.85032, 1.82253, 1.80566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;
    2.14495, 2.05257, 1.96625, 1.8868, 1.81513, 1.7522, 1.69898, 1.6564, 1.62531, 1.60636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;
    2.0002, 1.90081, 1.80724, 1.72047, 1.64155, 1.57169, 1.51213, 1.46413, 1.42886, 1.40727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;
    1.86569, 1.75871, 1.65714, 1.56205, 1.47468, 1.3965, 1.32911, 1.27423, 1.23354, 1.20847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;
    1.74379, 1.62882, 1.51859, 1.41421, 1.31708, 1.2289, 1.15175, 1.08797, 1.04002, 1.01015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;
    1.63732, 1.51429, 1.39503, 1.28062, 1.17247, 1.07248, 0.983123, 0.907565, 0.84949, 0.812655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;
    1.54946, 1.41882, 1.29078, 1.16619, 1.04628, 0.932847, 0.828571, 0.737342, 0.664554, 0.616772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;
    1.48351, 1.3465, 1.21084, 1.07703, 0.945883, 0.81866, 0.697517, 0.586237, 0.491561, 0.424745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;
    1.4425, 1.30118, 1.16023, 1.0198, 0.880167, 0.741757, 0.605418, 0.472941, 0.348759, 0.245781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;
    1.42857, 1.28571, 1.14286, 1, 0.857143, 0.714286, 0.571429, 0.428571, 0.285714, 0.142857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;
    1.4425, 1.30118, 1.16023, 1.0198, 0.880167, 0.741757, 0.605418, 0.472941, 0.348759, 0.245781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;
    1.48351, 1.3465, 1.21084, 1.07703, 0.945883, 0.81866, 0.697517, 0.586237, 0.491561, 0.424745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;
    1.54946, 1.41882, 1.29078, 1.16619, 1.04628, 0.932847, 0.828571, 0.737342, 0.664554, 0.616772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;
    1.63732, 1.51429, 1.39503, 1.28062, 1.17247, 1.07248, 0.983123, 0.907565, 0.84949, 0.812655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;
    1.74379, 1.62882, 1.51859, 1.41421, 1.31708, 1.2289, 1.15175, 1.08797, 1.04002, 1.01015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;
    1.86569, 1.75871, 1.65714, 1.56205, 1.47468, 1.3965, 1.32911, 1.27423, 1.23354, 1.20847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;
    2.0002, 1.90081, 1.80724, 1.72047, 1.64155, 1.57169, 1.51213, 1.46413, 1.42886, 1.40727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;
    2.14495, 2.05257, 1.96625, 1.8868, 1.81513, 1.7522, 1.69898, 1.6564, 1.62531, 1.60636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;
    2.298, 2.21203, 2.13216, 2.05913, 1.99366, 1.93654, 1.88853, 1.85032, 1.82253, 1.80566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;
    2.45781, 2.37762, 2.3035, 2.23607, 2.17594, 2.12372, 2.08003, 2.0454, 2.02031, 2.0051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]
# двуполостной гиперболоид
# 2)
f1(x, y) := a*x^2 - b*y^2*sin(y)^2
Q := CreateMesh(f1, -π, π, -π, π, 10)
# [component: inputs Q]
# [component: inputs Q]
# [component: inputs Q]
# [component: inputs Q]
# [component: inputs Q]
# 3)
a := 0.01
b := 5
g(x) := 2*x - cos(x)/x
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# интервал без точек разрыва
# вращение вокруг ох
F(u, v) := u
G(u, v) := g(u)*cos(v)
m := 30
H(u, v) := g(u)*sin(v)
Gx := CreateMesh(F, G, H, a, b, 0, 2*π, m)
# [component: inputs Gx]
# вращение вокруг оу
F(u, v) := u*sin(v)
G(u, v) := u*cos(v)
H(u, v) := g(u)
Gy := CreateMesh(F, G, H, a, b, 0, 2*π, m)
# [component: inputs Gy]
# 4)
# параметрически
N := 20
i := 0 .. 20
j := 0 .. N - 4
ch(x) := (e^x - e^(-x))/2
φ[i] := i*π/N
θ[j] := j*2*π/N
X[i, j] := ch(φ[i])*cos(θ[j])
Y[i, j] := ch(φ[i])*sin(θ[j])
Z[i, j] := φ[i]
# [component: inputs (X, Y, Z)]
# катеноид
# 5)
b := 13  # повнрхност в виде вектора парметрических ф-иий
a := 7
T(φ, θ) := [a*cos(φ)*sin(θ); b*sin(φ)*sin(θ); c*cos(θ)]
# [component: inputs T]
# Эллипсоид
# 6) | построить прямую
N := 40
i := 0 .. N
x[i] := 4*i + 2
y[i] := 6*i + 7
z[i] := -3*i + 0
# [component: inputs (x, y, z)]
# 7)
z3(x, y) := b
z2(x, y) := a
# [component: inputs z2, z3]
# [component: inputs z2, z3]
# [component: inputs z2, z3]
# [component: inputs Polyhedron("#30")]
